# Запишем условие задания
X1 := [2; 5]
Y1 := [12; 9]  # - координаты отрезка AB
X2 := [2; 5]
Y2 := [3; 6]  # - координаты отрезка CD
# Найдем точку пересечения прямых
(y - y1)/(y2 - y1) := (x - x1)/(x2 - x1)  # error: Здесь необходимо указать имя.  # - уравнение прямой
# График :
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A(2, 12)*и*B(5, 9)
C(2, 3)*и*D(5, 6)
x1 := 2
x2 := 5
х1 := 2
х2 := 5
y1 := 12
y2 := 9
у1 := 3
у2 := 6
a := (y2 - y1)/(x2 - x1) = -1
а := (у2 - у1)/(х2 - х1) = 1
b := x1 - a*y1 = 14
в := -х1 + а*у1 = 1
f1(x) := a*x + b
f2(x) := а*x + в
Given
x + y == 14  # - уравнение прямой АВ
x - y == -1  # - уравнение прямой CD
Find(x, y) → [13/2; 15/2]
Px := 13/2
Py := 15/2  # - Ответ
# Найдем новые координаты точек A,B,C,D после поворота на угол 135^о
P := [X1[0], X1[1], X2[0], X2[1]; Y1[0], Y1[1], Y2[0], Y2[1]; 1, 1, 1, 1]  # - матрица координат
Ts(dx, dy) := [1, 0, -dx; 0, 1, -dy; 0, 0, 1]  # - смещение начала системы координат
Rs(ϕ) := [cos(ϕ), sin(ϕ), 0; -sin(ϕ), cos(ϕ), 0; 0, 0, 1]  # - поворот системы координат на угол ϕ
7
ϕ := 225
ϕ_rad := ϕ*π/180  # - угол в радианах
# Сместим систему координат в точку Р
A := Ts(Px, Py)*P = [-4.5, -1.5, -4.5, -1.5; 4.5, 1.5, -4.5, -1.5; 1, 1, 1, 1]
# Повернем систему координат на 135 градусов
B := Rs(ϕ_rad)*A = [0, 0, 6.36396, 2.12132; -6.36396, -2.12132, 0, 0; 1, 1, 1, 1]
# Снова сместим систему координат в исходное положение
Q := Ts(-Px, -Py)*B = [6.5, 6.5, 12.864, 8.62132; 1.13604, 5.37868, 7.5, 7.5; 1, 1, 1, 1]
X4 := [Q[0, 2]; Q[0, 3]]
Y4 := [Q[1, 2]; Q[1, 3]]
X3 := [Q[0, 0]; Q[0, 1]]
Y3 := [Q[1, 0]; Q[1, 1]]
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