## Задание №1
n := 5
x := 2
y := (sqrt(x^3 + n) + cos(|n*x - 1|)^2)/(nthroot(x^5 + sin(x) + n, 4)*cos(π/4*(x + n)))
y = 2.52809
## Задание №2
x := 7
y := 10
z := -3
p := if(x > y, sin(x) + 3*|y| - z^2, (y + 3)*ln(|x + 1|)/sqrt(z^2 + 1))
p = 8.5485
q := if((x > y) and x < 1, cos(x) + 2*|y + 1|, (x*y + 3)/sqrt(y^2 + 5))
q = 7.12407
w := if((x < y) or (y ≥ 10), x^2 + 2*(y*x + 1) - z, (x^-3*y^2 + 3)*sqrt(z^2 + 7))
w = 194
## Задание №3
x := none
n := 1
y(x) := (x*x - x*n + sin(x))*sqrt(|x - cos(n*x)|)
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## Задание №4
n := 2
a := -3*n
b := 3*n
a = -6
b = 6
A := runif(3, a, b)
# B=runif (3,а,b)
B := runif(3, a, b)
C := runif(3, a, b)
# C=runif (3,а,b)
A = [-5.98478; -3.68012; 1.02007]
B = [-1.7963; 3.87405; -3.91045]
C = [2.52594; -2.35217; -4.90306]
s := A*B
N := B×C
s = -7.49547
N = [-28.1928; -18.685; -5.56044]
w := (A×B)*C
w = 231.818
dA := sqrt(A[0]^2 + A[1]^2 + A[2]^2)
dB := sqrt(B[0]^2 + B[1]^2 + B[2]^2)
dC := sqrt(C[0]^2 + C[1]^2 + C[2]^2)
dA = 7.0994
dB = 5.79022
dC = 5.99609
Array := [dA; dB; dC]
MaxFromArray := max(Array)
MaxFromArray = 7.0994
## Задание №8
x := none
q(x) := exp(-x^2)
i(x) := d/dx(q(x))
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## Задание №5
y(x) := exp(-|x|/3)*cos(x)
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## Задание №6
x := -9, -9 + 0.25 .. 9
f(x) := if(x < 0, exp(x)*x^3, exp(-x)*x^3)
x = [
    -9; -8.75; -8.5; -8.25; -8; -7.75; -7.5; -7.25; -7; -6.75
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]
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## Задание №7
Δx := π/4
i := 1 .. 16
x1 := -2*π
j := 1 .. 16
x[i] := x1 + i*Δx
g(x) := sqrt(|x|)*sin(x)
x = [0; -5.49779; -4.71239; -3.92699; -3.14159; -2.35619; -1.5708; -0.785398; 0; 0.785398; 1.5708; 2.35619; 3.14159; 3.92699; 4.71239; 5.49779; 6.28319]  # X
g(x) = [0; 2.69879; 3.81667; 2.69879; 0; -2.69879; -3.81667; -2.69879; 0; 2.69879; 3.81667; 2.69879; 0; -2.69879; -3.81667; -2.69879; 0]
Y := g(x)
root(f(p), p, -4, 4)
filename1 := "Matr_X.txt"
filename2 := "Matr_Y.txt"
Y = [0; 2.69879; 3.81667; 2.69879; 0; -2.69879; -3.81667; -2.69879; 0; 2.69879; 3.81667; 2.69879; 0; -2.69879; -3.81667; -2.69879; 0]
WRITEPRN(filename1) := x
WRITEPRN(filename2) := Y
XX := READPRN(filename1)
YY := READPRN(filename2)
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XX = [0; -5.498; -4.712; -3.927; -3.142; -2.356; -1.571; -0.7854; 0; 0.7854; 1.571; 2.356; 3.142; 3.927; 4.712; 5.498; 6.283]
YY = [0; 2.699; 3.817; 2.699; 0; -2.699; -3.817; -2.699; 0; 2.699; 3.817; 2.699; 0; -2.699; -3.817; -2.699; 0]
## Задание №9
h(x, y) := sin(sqrt(x^2 + y^2))/sqrt(x^2 + y^2)
# [component: inputs h]
## Задание №10
x := none
f(x) := x^2 + (x - 2)*sin(x) - 5
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x := -2
x1 := 3
root(f(x), x) = -1.32936
root(f(x), x, 0, 4) = 2.19967
## Задание №11
x := none
f(x) := x^2 + x*sin(2*x) - (x - 5)*cos(x)
x1 := -4
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root(f(x1), x1) = -2.97354
root(f(x1), x1, -4, -2) = -2.97354
root(f(x1), x1, -2, 0) = -1.93283
## Задание №12
x := none
x^3 + (4 - n)*x^2 + (3 - 4*n)*x - 3*n == 0
n := 5
p(x) := x^3 + (4 - n)*x^2 + (3 - 4*n)*x - 3*n
V := p(x) coeffs → [-15; -17; -1; 1]
R := polyroots(V)
R = [-3; -1; 5]
## Задание №13
z := none
x := none
y := none
n := 3
A := [n, (n + 1), n + 2; n - 3, n - 2, n; n - 1, n, n + 1]
B := [6*n + 8; 6*n - 7; 6*n + 2]
[x; y; z] := A^-1*B
X := [x; y; z]
X = [1; 2; 3]
## Задание №14
y := none
x := none
n := 3
y(x) := (x - n)^2 - n
f(x) := (n - x)/2
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x := 5.92
y := 2.9167
Given
((x - n)^2 - n)*y
## Задание №15
x := none
f(x) := x*sin(x)
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x1 := 0
xn := 10
Δx := 0.1
x := x1, x1 + Δx .. xn
x := 3
Minimize(f, x, 0, 10) = [4.91318; 0; 10]
Maximize(f, x, 0, 10) = [2.02876; 0; 10]
