A := [0, 1, 2; 1, 2, 3; 2, 3, 4]
B := [1, 2, 3; 2, 3, 4; 3, 4, 5]
V1 := [0; 1; 2]
V2 := [1; 2; 3]
A*B = [8, 11, 14; 14, 20, 26; 20, 29, 38]
A + B = [1, 3, 5; 3, 5, 7; 5, 7, 9]
transpose(V1)*V2 → 8
transpose(V1)*A*V2 = 54
V1×V2 = [-1; 2; -1]
V1*V2 = 8
|V1| = 2.23607
V1*V2/(|V1|*|V2|) = 0.956183
